// SBML level 2 version 1

model M2()
  // Model2

  // Compartments:
  compartment compartment = 1;
  compartment CytosolMembrane = 1.16;
  compartment nucleus = 0.65;

  // Species:
  species bcat_cm in CytosolMembrane = 46.6;
  species ligand_cm in CytosolMembrane = 581.1;
  species complex_cm in CytosolMembrane = 418.9;
  species bcat_nu in nucleus = 32.6;
  species ligand_nu in nucleus = 516.8;
  species complex_nu in nucleus = 483.2;
  species drag in CytosolMembrane;

  // Parameters:
  wnt_level = 0;
  kdegradation = 0.0163;
  Bsyn = 1.306;
  K_n_active_k = 17.16;
  kC_k1 = 1e-5;
  kC_k2 = 0.000647;
  kN_k1 = 0.0001;
  kN_k2 = 0.00349;
  kdiffusion_k = 39.13;
  K_c_active_k = 4.5;
  gamma = 1;
  ComplexTransitThreshold = 1;

  // Assignment rules:
  drag := piecewise((complex_cm - 700)/10, (complex_cm - 700)/10 > 1, 1);

  // Reactions:
  Bsynthesis: => bcat_cm; Bsyn*CytosolMembrane;
  kDegradation: bcat_cm => ; CytosolMembrane*kdegradation*gamma*bcat_cm*(1 - 0.5*wnt_level);
  kC: bcat_cm + ligand_cm -> complex_cm; CytosolMembrane*(kC_k1*bcat_cm*ligand_cm - kC_k2*complex_cm);
  kN: bcat_nu + ligand_nu -> complex_nu; nucleus*(kN_k1*bcat_nu*ligand_nu - kN_k2*complex_nu);
  kdiffusion: bcat_cm => bcat_nu; kdiffusion_k*(bcat_cm - bcat_nu);
  K_c_active: bcat_cm => bcat_nu; K_c_active_k*bcat_cm;
  K_n_active: bcat_nu => bcat_cm; K_n_active_k*bcat_nu;

  // Unit definitions:
  unit time = 60 second; time is "minutes";
end
