// SBML level 2 version 4

model VanLeeuwen()
  // VanLeeuwen

  // Compartments:
  compartment cytosolmembraneandnucleus = 1;

  // Species:
  species X in cytosolmembraneandnucleus = 0.268/cytosolmembraneandnucleus;
  species D in cytosolmembraneandnucleus = 2.68/cytosolmembraneandnucleus;
  species C_o in cytosolmembraneandnucleus = 76.2/cytosolmembraneandnucleus;
  species C_u in cytosolmembraneandnucleus = 13.5/cytosolmembraneandnucleus;
  species C_c in cytosolmembraneandnucleus = 0;
  species A in cytosolmembraneandnucleus = 300/cytosolmembraneandnucleus;
  species C_A in cytosolmembraneandnucleus = 544.2/cytosolmembraneandnucleus;
  species T in cytosolmembraneandnucleus = 750/cytosolmembraneandnucleus;
  species C_oT in cytosolmembraneandnucleus = 76.2/cytosolmembraneandnucleus;
  species C_cT in cytosolmembraneandnucleus = 0;
  species Y in cytosolmembraneandnucleus = 36/cytosolmembraneandnucleus;
  species C_F in cytosolmembraneandnucleus;
  species C_T in cytosolmembraneandnucleus;
  species drag in cytosolmembraneandnucleus;

  // Parameters:
  K_T = 1500;
  K_C = 6000;
  K_D = 150;
  p_u = 1;
  wnt_level = 0;
  xi_D = 0.006666667;
  xi_Dx = 0.006666667;
  xi_X = 0.2666667;
  xi_C = 0;
  d_Dx = 0.006666667;
  d_X = 0.1333333;
  d_D = 0.006666667;
  p_c = 0;
  gamma1 = 1;
  gamma2 = 1;
  s_D = 0.1333333;
  s_X = 0.05333333;
  d_u = 0.06666667;
  s_c = 1;
  d_c = 0.001333333;
  s_CA = 0.01111111;
  d_CA = 0.4666667;
  s_CT = 0.001333333;
  d_CT = 1;
  s_A = 0.8;
  d_A = 0.002666667;
  s_T = 0.4;
  d_T = 0.0005333333;
  s_Y = 1;
  d_Y = 0.001333333;
  ComplexTransitThreshold = 1;

  // Assignment rules:
  C_F := C_o + C_c;
  C_T := C_oT + C_cT;
  drag := piecewise((C_A - 2300)/36, (C_A - 2300)/36 > 1, 1);

  // Reactions:
  r1: X => D; s_D*gamma1*X;
  r2: D => X; (d_Dx + wnt_level*xi_Dx)*D;
  r22: => X; s_X;
  r23: X => ; (d_X + wnt_level*xi_X)*X;
  r7: C_o + D => C_u + D; p_u*gamma2*C_o*D/(C_o + C_c + K_D);  // modifiers: C_c
  r16: C_c + D => C_u + D; p_u*gamma2*C_c*D/(C_c + C_o + K_D);  // modifiers: C_o
  r8: C_u => ; d_u*C_u;
  r3: => C_o; s_c;
  r4: C_o => ; d_c*C_o;
  r17: C_c => ; d_c*C_c;
  r9: C_o + A => C_A; s_CA*C_o*A;
  r10: C_A => C_o + A; d_CA*C_A;
  r11: C_o + T => C_oT; s_CT*C_o*T;
  r18: C_c + T => C_cT; s_CT*C_c*T;
  r12: C_oT => C_o + T; d_CT*C_oT;
  r19: C_cT => C_c + T; d_CT*C_cT;
  r15: C_o => C_c; (p_c + wnt_level*xi_C)*C_o/(C_o + K_C);
  r5: => A; s_A;
  r6: A => ; d_A*A;
  r20: => T; s_T;
  r21: T => ; d_T*T;
  r13: C_oT => Y + C_oT; s_Y*(C_oT + C_cT)/(C_oT + C_cT + K_T);  // modifiers: C_cT
  r14: Y => ; d_Y*Y;
  r24: D => ; (d_D + wnt_level*xi_D)*D;

  // Unit definitions:
  unit time = 3600 second; time is "hours";
end
