// SBML level 2 version 4

model VanLeeuwen()
  // VanLeeuwen

  // Compartments:
  compartment cytosolmembraneandnucleus = 1 MWDERIVEDUNIT_meter___3;

  // Species:
  species X in cytosolmembraneandnucleus = 0.067;  // substance in MWBUILTINPREFIX_nano_MWBUILTINUNIT_mole
  species D in cytosolmembraneandnucleus = 0.67;  // substance in MWBUILTINPREFIX_nano_MWBUILTINUNIT_mole
  species C_o in cytosolmembraneandnucleus = 2.54;  // substance in MWBUILTINPREFIX_nano_MWBUILTINUNIT_mole
  species C_u in cytosolmembraneandnucleus = 0.45;  // substance in MWBUILTINPREFIX_nano_MWBUILTINUNIT_mole
  species C_c in cytosolmembraneandnucleus = 0;  // substance in MWBUILTINPREFIX_nano_MWBUILTINUNIT_mole
  species A in cytosolmembraneandnucleus = 10;  // substance in MWBUILTINPREFIX_nano_MWBUILTINUNIT_mole
  species C_A in cytosolmembraneandnucleus = 18.14;  // substance in MWBUILTINPREFIX_nano_MWBUILTINUNIT_mole
  species T in cytosolmembraneandnucleus = 25;  // substance in MWBUILTINPREFIX_nano_MWBUILTINUNIT_mole
  species C_oT in cytosolmembraneandnucleus = 2.54;  // substance in MWBUILTINPREFIX_nano_MWBUILTINUNIT_mole
  species C_cT in cytosolmembraneandnucleus = 0;  // substance in MWBUILTINPREFIX_nano_MWBUILTINUNIT_mole
  species Y in cytosolmembraneandnucleus = 0.48;  // substance in MWBUILTINPREFIX_nano_MWBUILTINUNIT_mole
  species C_F in cytosolmembraneandnucleus;  // substance in MWBUILTINPREFIX_nano_MWBUILTINUNIT_mole
  species C_T in cytosolmembraneandnucleus;  // substance in MWBUILTINPREFIX_nano_MWBUILTINUNIT_mole
  species drag in cytosolmembraneandnucleus;

  // Parameters:
  K_T = 50 MWDERIVEDUNIT_nanomole__meter___3;
  K_C = 200 MWDERIVEDUNIT_nanomole__meter___3;
  K_D = 5 MWDERIVEDUNIT_nanomole__meter___3;
  p_u = 100 MWDERIVEDUNIT_1__hour;
  wnt_level = 0;
  gamma1 = 1;
  gamma2 = 1;
  xi_D = 5;
  xi_Dx = 5;
  xi_X = 200;
  xi_C = 0;
  s_D = 100 MWDERIVEDUNIT_1__hour;
  d_Dx = 5 MWDERIVEDUNIT_1__hour;
  s_X = 10 MWDERIVEDUNIT_nanomole__meter___3_hour;
  d_X = 100 MWDERIVEDUNIT_1__hour;
  d_u = 50 MWDERIVEDUNIT_1__hour;
  s_c = 25 MWDERIVEDUNIT_nanomole__meter___3_hour;
  d_c = 1 MWDERIVEDUNIT_1__hour;
  s_CA = 250 MWDERIVEDUNIT_1__nanomole__meter___3_hour;
  d_CA = 350 MWDERIVEDUNIT_1__hour;
  s_CT = 30 MWDERIVEDUNIT_1__nanomole__meter___3_hour;
  d_CT = 750 MWDERIVEDUNIT_1__hour;
  p_c = 0 MWDERIVEDUNIT_1__hour;
  s_A = 20 MWDERIVEDUNIT_nanomole__meter___3_hour;
  d_A = 2 MWDERIVEDUNIT_1__hour;
  s_T = 10 MWDERIVEDUNIT_nanomole__meter___3_hour;
  d_T = 0.4 MWDERIVEDUNIT_1__hour;
  s_Y = 10 MWDERIVEDUNIT_1__hour;
  d_Y = 1 MWDERIVEDUNIT_1__hour;
  d_D = 5 MWDERIVEDUNIT_1__hour;
  ComplexTransitThreshold = 1;

  // Assignment rules:
  C_F := C_o + C_c;
  C_T := C_oT + C_cT;
  drag := piecewise((C_A - 100)/3, (C_A - 100)/3 >= 1, 1);

  // Reactions:
  r1: X => D; s_D*gamma1*X;
  r2: D => X; (d_Dx + wnt_level*xi_Dx)*D;
  r22: => X; s_X*cytosolmembraneandnucleus;
  r23: X => ; (d_X + wnt_level*xi_X)*X;
  r7: C_o + D => C_u + D; p_u*gamma2*C_o*D/(C_o + C_c + K_D);  // modifiers: C_c
  r16: C_c + D => C_u + D; p_u*gamma2*C_c*D/(C_c + C_o + K_D);  // modifiers: C_o
  r8: C_u => ; d_u*C_u*cytosolmembraneandnucleus;
  r3: => C_o; s_c*cytosolmembraneandnucleus;
  r4: C_o => ; d_c*C_o*cytosolmembraneandnucleus;
  r17: C_c => ; d_c*C_c*cytosolmembraneandnucleus;
  r9: C_o + A => C_A; s_CA*C_o*A*cytosolmembraneandnucleus;
  r10: C_A => C_o + A; d_CA*C_A*cytosolmembraneandnucleus;
  r11: C_o + T => C_oT; s_CT*C_o*T*cytosolmembraneandnucleus;
  r18: C_c + T => C_cT; s_CT*C_c*T*cytosolmembraneandnucleus;
  r12: C_oT => C_o + T; d_CT*C_oT*cytosolmembraneandnucleus;
  r19: C_cT => C_c + T; d_CT*C_cT*cytosolmembraneandnucleus;
  r15: C_o => C_c; (p_c + wnt_level*xi_C)*C_o/(C_o + K_C);
  r5: => A; s_A*cytosolmembraneandnucleus;
  r6: A => ; d_A*A*cytosolmembraneandnucleus;
  r20: => T; s_T*cytosolmembraneandnucleus;
  r21: T => ; d_T*T*cytosolmembraneandnucleus;
  r13: C_oT => Y + C_oT; s_Y*(C_oT + C_cT)/(C_oT + C_cT + K_T);  // modifiers: C_cT
  r14: Y => ; d_Y*Y*cytosolmembraneandnucleus;
  r24: D => ; (d_D + wnt_level*xi_D)*D;

  // Unit definitions:
  unit time = 3600 second; time is "hours";
  unit MWDERIVEDUNIT_meter___3 = metre^3 * dimensionless; MWDERIVEDUNIT_meter___3 is "meter^3";
  unit MWBUILTINPREFIX_nano_MWBUILTINUNIT_mole = 1e-9 mole; MWBUILTINPREFIX_nano_MWBUILTINUNIT_mole is "nanomole";
  unit MWDERIVEDUNIT_nanomole__meter___3 = mole * 1e-9 dimensionless / metre^3; MWDERIVEDUNIT_nanomole__meter___3 is "nanomole/meter^3";
  unit MWDERIVEDUNIT_1__hour = 2.777778e-4 dimensionless / second; MWDERIVEDUNIT_1__hour is "1/hour";
  unit MWDERIVEDUNIT_nanomole__meter___3_hour = mole * 2.777778e-13 dimensionless / (metre^3 * second); MWDERIVEDUNIT_nanomole__meter___3_hour is "nanomole/(meter^3*hour)";
  unit MWDERIVEDUNIT_1__nanomole__meter___3_hour = metre^3 * 277777.8 dimensionless / (mole * second); MWDERIVEDUNIT_1__nanomole__meter___3_hour is "1/(nanomole/meter^3*hour)";
end
